# OpenSim document version 40000
Model modelModified:
  gravity: 0 -9.80665 0
  length_units: meters
  force_units: N
  credits:
    Rajagopal, A, Dembia, C.L., DeMers, M.S., Delp, D.D., Hicks, J.L., and Delp, S.L.
  publications:
    Rajagopal, Apoorva, et al. "Full-Body Musculoskeletal Model for Muscle-Driven Simulation of Human Gait." IEEE Transactions on Biomedical Engineering 63.10 (2016): 2068-2079. (2016)
  Ground
  BodySet:
    Body pelvis: mass=12.69159 [kg] mass_center=(-0.06072218 0 0) inertia=(0.08172036 0.06923972 0.04602732 0 0 0)
        meshes=(r_pelvis.vtp l_pelvis.vtp sacrum.vtp)
      WrapCylinder Gmax1_at_pelvis_r: xyz_body_rotation=(-0.6 0.45 0) translation=(-0.06613306 -0.08502823 0.05239113)
          quadrant=-x radius=0.03435484 length=0.1288306
      WrapCylinder Gmax2_at_pelvis_r: xyz_body_rotation=(-0.75 0.39 0) translation=(-0.06870968 -0.07128629 0.05840323)
          quadrant=all radius=0.03435484 length=0.0858871
      WrapCylinder Gmax3_at_pelvis_r: xyz_body_rotation=(-0.1 0 0) translation=(-0.07128629 -0.07558065 0.05840323)
          quadrant=all radius=0.03435484 length=0.0858871
      WrapCylinder Gmax1_at_pelvis_l: xyz_body_rotation=(0.6 -0.45 0) translation=(-0.06613306 -0.08502823 -0.05239113)
          quadrant=-x radius=0.03435484 length=0.1288306
      WrapCylinder Gmax2_at_pelvis_l: xyz_body_rotation=(0.75 -0.39 0)
          translation=(-0.06870968 -0.07128629 -0.05840323) quadrant=all radius=0.03435484 length=0.0858871
      WrapCylinder Gmax3_at_pelvis_l: xyz_body_rotation=(0.1 0 0) translation=(-0.07128629 -0.07558065 -0.05840323)
          quadrant=all radius=0.03435484 length=0.0858871
      WrapCylinder PS_at_brim_r: xyz_body_rotation=(-0.25 -0.27 0.1) translation=(-0.06355645 -0.05153226 0.05634194)
          quadrant=-y radius=0.04294355 length=0.0858871
      WrapCylinder PS_at_brim_l: xyz_body_rotation=(0.25 0.27 0.1) translation=(-0.06355645 -0.05153226 -0.05634194)
          quadrant=-y radius=0.04294355 length=0.0858871
      WrapCylinder IL_at_brim_r: xyz_body_rotation=(-0.32 -0.24 0.9) translation=(-0.06097984 -0.05582661 0.06493065)
          quadrant=-y radius=0.04715202 length=0.0858871
      WrapCylinder IL_at_brim_l: xyz_body_rotation=(0.32 0.24 0.9) translation=(-0.06097984 -0.05582661 -0.06493065)
          quadrant=-y radius=0.04715202 length=0.0858871
    Body femur_r: mass=10.02374 mass_center=(0 -0.204731 0) inertia=(0.2092817 0.05486026 0.2206914 0 0 0)
        meshes=r_femur.vtp
      WrapCylinder Gastroc_at_condyles_r: translation=(0.0060215 -0.493763 0) quadrant=all radius=0.0301075
          length=0.12043
      WrapCylinder KnExt_at_fem_r: xyz_body_rotation=(-0.0623366 0.0507601 0)
          translation=(0.004321366 -0.4850102 0.002518324) quadrant=all radius=0.0301075 length=0.12043
      WrapCylinder AB_at_femshaft_r: xyz_body_rotation=(1.66157 0.186644 0)
          translation=(0.01763505 -0.1355982 0.02813847) quadrant=all radius=0.01987095 length=0.08430101
      WrapCylinder AL_at_femshaft_r: xyz_body_rotation=(1.77711 0.136489 0)
          translation=(0.03701139 -0.279288 0.01820143) quadrant=all radius=0.02420643 length=0.12043
      WrapCylinder AMprox_at_femshaft_r: xyz_body_rotation=(1.61126 0.18656 0)
          translation=(0.006241875 -0.08778721 0.03059283) quadrant=all radius=0.02541073 length=0.08430101
      WrapCylinder AMmid_at_femshaft_r: xyz_body_rotation=(1.61139 0.13656 0)
          translation=(0.02771396 -0.1935443 0.02478955) quadrant=all radius=0.02577202 length=0.144516
      WrapCylinder AMdist_at_femshaft_r: xyz_body_rotation=(1.71188 0.186636 0)
          translation=(0.03806371 -0.3140044 0.01127779) quadrant=all radius=0.02625374 length=0.24086
      WrapCylinder AMisch_at_condyles_r: xyz_body_rotation=(1.71115 -0.463363 0)
          translation=(-0.02727872 -0.4538176 -0.003798808) quadrant=all radius=0.048172 length=0.289032
      WrapCylinder PECT_at_femshaft_r: xyz_body_rotation=(1.81295 0.276344 0)
          translation=(0.007329045 -0.1017668 0.0366595) quadrant=all radius=0.0180645 length=0.060215
    Body femoral_cond_r: mass=0 mass_center=(0 0 0) inertia=(0 0 0 0 0 0) meshes=fem_cond.vtp
    Body sagittal_articulation_frame_r: mass=0 mass_center=(0 0 0) inertia=(0 0 0 0 0 0)
    Body med_cond_r: mass=1.077659e-7 mass_center=(0 0 0) inertia=(1.338648e-7 1.208153e-7 1.208153e-7 0 0 0)
        meshes=sphere.vtp
    Body lat_cond_r: mass=1.077659e-7 mass_center=(0 0 0) inertia=(1.338648e-7 1.208153e-7 1.208153e-7 0 0 0)
        meshes=sphere.vtp
    Body tibial_plat_r: mass=0 mass_center=(0 0 0) inertia=(0 0 0 0 0 0) meshes=tib_plat.vtp
    Body tibia_r: mass=3.99542 mass_center=(0 -0.2028591 0) inertia=(0.06412273 0.00648861 0.06501333 0 0 0)
        meshes=(r_tibia.vtp r_fibula.vtp)
      WrapCylinder GasLat_at_shank_r: xyz_body_rotation=(2.96723 -0.279725 -1.47812)
          translation=(-0.008040477 -0.08040477 -0.003585618) quadrant=-y radius=0.0597603 length=0.1086551
      WrapCylinder GasMed_at_shank_r: xyz_body_rotation=(2.96723 0.0279725 -1.47812)
          translation=(-0.008040477 -0.08040477 -0.003585618) quadrant=-y radius=0.0597603 length=0.1086551
      WrapCylinder GR_at_condyles_r: xyz_body_rotation=(0 -0.4 0) translation=(-0.003259653 -0.02173102 0) quadrant=all
          radius=0.03911583 length=0.1086551
      WrapCylinder SM_at_condyles_r: xyz_body_rotation=(0 -0.1 0) translation=(-0.001086551 -0.02173102 0) quadrant=all
          radius=0.03824659 length=0.1086551
      WrapCylinder ST_at_condyles_r: xyz_body_rotation=(0 -0.2 0) translation=(-0.002173102 -0.02227429 0) quadrant=all
          radius=0.04617841 length=0.1086551
      WrapCylinder BF_at_gastroc_r: translation=(-0.06301995 -0.06519305 0) quadrant=y radius=0.03259653
          length=0.1629826
    Body patella_r: mass=0.0928942 mass_center=(0.00216774 0.03179352 0)
        inertia=(4.485725e-6 2.049054e-5 2.049054e-5 0 0 0) meshes=r_patella.vtp
    Body talus_r: mass=0.1077659 mass_center=(0 0 0) inertia=(0.001220425 0.001220425 0.001220425 0 0 0)
        meshes=r_talus.vtp
    Body calcn_r: mass=1.347074 mass_center=(0.106418 0.03192539 0) inertia=(0.001708595 0.004759659 0.005003744 0 0 0)
        meshes=r_foot.vtp
    Body toes_r: mass=0.2334209 mass_center=(0.03682061 0.006385078 -0.01862314)
        inertia=(0.0001220425 0.0002440851 0.001220425 0 0 0) meshes=r_bofoot.vtp
    Body femur_l: mass=10.02374 mass_center=(0 -0.204731 0) inertia=(0.2092817 0.05486026 0.2206914 0 0 0)
        meshes=l_femur.vtp
      WrapCylinder Gastroc_at_condyles_l: translation=(0.0060215 -0.493763 0) quadrant=all radius=0.0301075
          length=0.12043
      WrapCylinder KnExt_at_fem_l: xyz_body_rotation=(0.0623366 -0.0507601 0)
          translation=(0.004321366 -0.4850102 -0.002518324) quadrant=all radius=0.0301075 length=0.12043
      WrapCylinder AB_at_femshaft_l: xyz_body_rotation=(-1.66157 -0.186644 0)
          translation=(0.01763505 -0.1355982 -0.02813847) quadrant=all radius=0.01987095 length=0.08430101
      WrapCylinder AL_at_femshaft_l: xyz_body_rotation=(-1.77711 -0.136489 0)
          translation=(0.03701139 -0.279288 -0.01820143) quadrant=all radius=0.02420643 length=0.12043
      WrapCylinder AMprox_at_femshaft_l: xyz_body_rotation=(-1.61126 -0.18656 0)
          translation=(0.006241875 -0.08778721 -0.03059283) quadrant=all radius=0.02541073 length=0.08430101
      WrapCylinder AMmid_at_femshaft_l: xyz_body_rotation=(-1.61139 -0.13656 0)
          translation=(0.02771396 -0.1935443 -0.02478955) quadrant=all radius=0.02577202 length=0.144516
      WrapCylinder AMdist_at_femshaft_l: xyz_body_rotation=(-1.71188 -0.186636 0)
          translation=(0.03806371 -0.3140044 -0.01127779) quadrant=all radius=0.02625374 length=0.24086
      WrapCylinder AMisch_at_condyles_l: xyz_body_rotation=(-1.71115 0.463363 0)
          translation=(-0.02727872 -0.4538176 0.003798808) quadrant=all radius=0.048172 length=0.289032
      WrapCylinder PECT_at_femshaft_l: xyz_body_rotation=(-1.81295 -0.276344 0)
          translation=(0.007329045 -0.1017668 -0.0366595) quadrant=all radius=0.0180645 length=0.060215
    Body femoral_cond_l: mass=0 mass_center=(0 0 0) inertia=(0 0 0 0 0 0) meshes=fem_cond.vtp
    Body sagittal_articulation_frame_l: mass=0 mass_center=(0 0 0) inertia=(0 0 0 0 0 0)
    Body med_cond_l: mass=0 mass_center=(0 0 0) inertia=(0 0 0 0 0 0) meshes=sphere.vtp
    Body lat_cond_l: mass=1.077659e-7 mass_center=(0 0 0) inertia=(1.338648e-7 1.208153e-7 1.208153e-7 0 0 0)
        meshes=sphere.vtp
    Body tibial_plat_l: mass=0 mass_center=(0 0 0) inertia=(0 0 0 0 0 0) meshes=tib_plat.vtp
    Body tibia_l: mass=3.99542 mass_center=(0 -0.2028591 0) inertia=(0.06412273 0.00648861 0.06501333 0 0 0)
        meshes=(l_tibia.vtp l_fibula.vtp)
      WrapCylinder GasLat_at_shank_l: xyz_body_rotation=(-2.96723 0.279725 -1.47812)
          translation=(-0.008040477 -0.08040477 0.003585618) quadrant=-y radius=0.0597603 length=0.1086551
      WrapCylinder GasMed_at_shank_l: xyz_body_rotation=(-2.96723 -0.0279725 -1.47812)
          translation=(-0.008040477 -0.08040477 0.003585618) quadrant=-y radius=0.0597603 length=0.1086551
      WrapCylinder GR_at_condyles_l: xyz_body_rotation=(0 0.4 0) translation=(-0.003259653 -0.02173102 0) quadrant=all
          radius=0.03911583 length=0.1086551
      WrapCylinder SM_at_condyles_l: xyz_body_rotation=(0 0.1 0) translation=(-0.001086551 -0.02173102 0) quadrant=all
          radius=0.03824659 length=0.1086551
      WrapCylinder ST_at_condyles_l: xyz_body_rotation=(0 0.2 0) translation=(-0.002173102 -0.02227429 0) quadrant=all
          radius=0.04617841 length=0.1086551
      WrapCylinder BF_at_gastroc_l: translation=(-0.06301995 -0.06519305 0) quadrant=all radius=0.03259653
          length=0.1629826
    Body patella_l: mass=0.0928942 mass_center=(0.00216774 0.03179352 0)
        inertia=(4.485725e-6 2.049054e-5 2.049054e-5 0 0 0) meshes=l_patella.vtp
    Body talus_l: mass=0.1077659 mass_center=(0 0 0) inertia=(0.001220425 0.001220425 0.001220425 0 0 0)
        meshes=l_talus.vtp
    Body calcn_l: mass=1.347074 mass_center=(0.106418 0.03192539 0) inertia=(0.001708595 0.004759659 0.005003744 0 0 0)
        meshes=l_foot.vtp
    Body toes_l: mass=0.2334209 mass_center=(0.03682061 0.006385078 0.01862314)
        inertia=(0.0001220425 0.0002440851 0.001220425 0 0 0) meshes=l_bofoot.vtp
    Body torso: mass=36.89538 mass_center=(-0.02907782 0.3101634 0) inertia=(1.492819 0.7648862 1.449183 0 0 0)
        meshes=(hat_spine.vtp hat_jaw.vtp hat_skull.vtp hat_ribs_scap.vtp)
  JointSet:
    CustomJoint ground_pelvis: socket_parent_frame=ground_offset socket_child_frame=pelvis_offset
      Coordinate pelvis_tilt: default_value=0 range=(-1.570796 1.570796) clamped=true
      Coordinate pelvis_list: default_value=0 range=(-1.570796 1.570796) clamped=true
      Coordinate pelvis_rotation: default_value=0 range=(-2 2) clamped=false
      Coordinate pelvis_tx: default_value=0 range=(-5 5) clamped=true
      Coordinate pelvis_ty: default_value=0.94 range=(-1 2) clamped=true
      Coordinate pelvis_tz: default_value=0 range=(-3 3) clamped=true
      PhysicalOffsetFrame ground_offset: socket_parent=/ground translation=(0 0 0) [meters]
      PhysicalOffsetFrame pelvis_offset: socket_parent=/bodyset/pelvis translation=(0 0 0)
      SpatialTransform:
        TransformAxis rotation1: coordinates=pelvis_tilt axis=(0 0 1) LinearFunction(coefficients=1 0)
        TransformAxis rotation2: coordinates=pelvis_list axis=(1 0 0) LinearFunction(coefficients=1 0)
        TransformAxis rotation3: coordinates=pelvis_rotation axis=(0 1 0) LinearFunction(coefficients=1 0)
        TransformAxis translation1: coordinates=pelvis_tx axis=(1 0 0) LinearFunction(coefficients=1 0)
        TransformAxis translation2: coordinates=pelvis_ty axis=(0 1 0) LinearFunction(coefficients=1 0)
        TransformAxis translation3: coordinates=pelvis_tz axis=(0 0 1) LinearFunction(coefficients=1 0)
    CustomJoint hip_r: socket_parent_frame=pelvis_offset socket_child_frame=femur_r_offset
      Coordinate hip_flexion_r: default_value=0 range=(-0.5235988 2.094395) clamped=true
      Coordinate hip_adduction_r: default_value=0 range=(-0.8726646 0.5235988) clamped=true
      Coordinate hip_rotation_r: default_value=0 range=(-0.6981317 0.6981317) clamped=true
      PhysicalOffsetFrame pelvis_offset: socket_parent=/bodyset/pelvis translation=(-0.04833382 -0.06741278 0.06635637)
      PhysicalOffsetFrame femur_r_offset: socket_parent=/bodyset/femur_r translation=(0 0 0)
      SpatialTransform: axes_held_at_zero=(translation1 translation2 translation3)
        TransformAxis rotation1: coordinates=hip_flexion_r axis=(0 0 1) LinearFunction(coefficients=1 0)
        TransformAxis rotation2: coordinates=hip_adduction_r axis=(1 0 0) LinearFunction(coefficients=1 0)
        TransformAxis rotation3: coordinates=hip_rotation_r axis=(0 1 0) LinearFunction(coefficients=1 0)
    WeldJoint femur_weld_r: socket_parent_frame=femur_r_offset socket_child_frame=femoral_cond_r_offset
      PhysicalOffsetFrame femur_r_offset: socket_parent=/bodyset/femur_r
          translation=(-0.009742788 -0.4913063 -0.003311825)
      PhysicalOffsetFrame femoral_cond_r_offset: socket_parent=/bodyset/femoral_cond_r translation=(0 0 0)
    CustomJoint walker_knee_r: socket_parent_frame=femoral_cond_r_offset
        socket_child_frame=sagittal_articulation_frame_r_offset
      Coordinate knee_angle_r: default_value=0 range=(0 2.0944) clamped=true
      PhysicalOffsetFrame femoral_cond_r_offset: socket_parent=/bodyset/femoral_cond_r translation=(0 0 0)
          orientation=(-1.64157 1.44618 1.5708) [radians]
      PhysicalOffsetFrame sagittal_articulation_frame_r_offset: socket_parent=/bodyset/sagittal_articulation_frame_r
          translation=(-0.00808954 -0.0035348 -0.001844316) orientation=(-1.64157 1.44618 1.5708)
      SpatialTransform: axes_held_at_zero=translation3
        TransformAxis rotation1: coordinates=knee_angle_r axis=(1 0 0) LinearFunction(coefficients=1 0)
        TransformAxis rotation2: coordinates=knee_angle_r axis=(0 0 1)
          SimmSpline: x=(0 0.174533 0.349066 0.523599 0.698132 0.872665 1.0472 1.22173 1.39626 1.5708 1.74533 1.91986 2.0944)
              y=(0 0.0126809 0.0226969 0.0296054 0.0332049 0.0335354 0.0308779 0.0257548 0.0189295 0.011407 0.00443314 -0.00050475 -0.0016782)
        TransformAxis rotation3: coordinates=knee_angle_r axis=(0 1 0)
          SimmSpline: x=(0 0.174533 0.349066 0.523599 0.698132 0.872665 1.0472 1.22173 1.39626 1.5708 1.74533 1.91986 2.0944)
              y=(0 0.059461 0.109399 0.150618 0.18392 0.210107 0.229983 0.24435 0.254012 0.25977 0.262428 0.262788 0.261654)
        TransformAxis translation1: coordinates=knee_angle_r axis=(0 1 0)
          MultiplierFunction: scale=1
            SimmSpline: x=(0 0.174533 0.349066 0.523599 0.698132 0.872665 1.0472 1.22173 1.39626 1.5708 1.74533 1.91986 2.0944)
                y=(0 0.000479 0.000835 0.001086 0.001251 0.001346 0.001391 0.001403 0.0014 0.0014 0.001421 0.001481 0.001599)
        TransformAxis translation2: coordinates=knee_angle_r axis=(0 0 1)
          MultiplierFunction: scale=1
            SimmSpline: x=(0 0.174533 0.349066 0.523599 0.698132 0.872665 1.0472 1.22173 1.39626 1.5708 1.74533 1.91986 2.0944)
                y=(0 0.000988 0.001899 0.002734 0.003492 0.004173 0.004777 0.005305 0.005756 0.00613 0.006427 0.006648 0.006792)
    CustomJoint med_cond_joint_r: socket_parent_frame=sagittal_articulation_frame_r_offset
        socket_child_frame=med_cond_r_offset
      Coordinate med_cond_adduction_r: default_value=0 range=(-2.094395 2.094395) clamped=true
          is_free_to_satisfy_constraints=true
      PhysicalOffsetFrame sagittal_articulation_frame_r_offset: socket_parent=/bodyset/sagittal_articulation_frame_r
          translation=(0 -0.025 -0.02484362)
      PhysicalOffsetFrame med_cond_r_offset: socket_parent=/bodyset/med_cond_r translation=(0 0 0)
      SpatialTransform: axes_held_at_zero=(rotation2 rotation3 translation1 translation2 translation3)
        TransformAxis rotation1: coordinates=med_cond_adduction_r axis=(1 0 0) LinearFunction(coefficients=1 0)
    CustomJoint lat_cond_joint_r: socket_parent_frame=sagittal_articulation_frame_r_offset
        socket_child_frame=lat_cond_r_offset
      Coordinate lat_cond_adduction_r: default_value=0 range=(-2.094395 2.094395) clamped=true
          is_free_to_satisfy_constraints=true
      PhysicalOffsetFrame sagittal_articulation_frame_r_offset: socket_parent=/bodyset/sagittal_articulation_frame_r
          translation=(0 -0.025 0.02484362)
      PhysicalOffsetFrame lat_cond_r_offset: socket_parent=/bodyset/lat_cond_r translation=(0 0 0)
      SpatialTransform: axes_held_at_zero=(rotation2 rotation3 translation1 translation2 translation3)
        TransformAxis rotation1: coordinates=lat_cond_adduction_r axis=(1 0 0) LinearFunction(coefficients=1 0)
    WeldJoint med_cond_weld_r: socket_parent_frame=med_cond_r_offset socket_child_frame=tibial_plat_r_offset
      PhysicalOffsetFrame med_cond_r_offset: socket_parent=/bodyset/med_cond_r translation=(0 0 0)
      PhysicalOffsetFrame tibial_plat_r_offset: socket_parent=/bodyset/tibial_plat_r translation=(0 -0.025 -0.02484362)
    CustomJoint tibial_plat_weld_r: socket_parent_frame=tibial_plat_r_offset socket_child_frame=tibia_r_offset
      Coordinate knee_add_r: default_value=0 range=(-0.2 0.2) clamped=true locked=true
      Coordinate knee_rot_r: default_value=0 range=(-0.2 0.2) clamped=true locked=true
      Coordinate knee_flex_r: default_value=0 range=(-0.2 0.2) clamped=true locked=true
      PhysicalOffsetFrame tibial_plat_r_offset: socket_parent=/bodyset/tibial_plat_r translation=(0 0 0)
      PhysicalOffsetFrame tibia_r_offset: socket_parent=/bodyset/tibia_r translation=(0 0 0)
      SpatialTransform: axes_held_at_zero=(translation1 translation2 translation3)
        TransformAxis rotation1: coordinates=knee_add_r axis=(1 0 0) LinearFunction(coefficients=1 0)
        TransformAxis rotation2: coordinates=knee_rot_r axis=(0 1 0) LinearFunction(coefficients=1 0)
        TransformAxis rotation3: coordinates=knee_flex_r axis=(0 0 1) LinearFunction(coefficients=1 0)
    CustomJoint patellofemoral_r: socket_parent_frame=femur_r_offset socket_child_frame=patella_r_offset
      Coordinate knee_angle_r_beta: default_value=0 range=(-99999.9 99999.9) clamped=false
      PhysicalOffsetFrame femur_r_offset: socket_parent=/bodyset/femur_r
          translation=(-0.009742788 -0.4913063 -0.003311825)
      PhysicalOffsetFrame patella_r_offset: socket_parent=/bodyset/patella_r translation=(0 0 0)
      SpatialTransform: axes_held_at_zero=(rotation2 rotation3)
        TransformAxis rotation1: coordinates=knee_angle_r_beta axis=(0 0 1)
          SimmSpline: x=(0 0.174533 0.349066 0.523599 0.698132 0.872665 1.0472 1.22173 1.39626 1.5708 1.74533 1.91986 2.0944)
              y=(0.00113686 -0.00629212 -0.105582 -0.253683 -0.414245 -0.579047 -0.747244 -0.91799 -1.09044 -1.26379 -1.43763 -1.61186 -1.78634)
        TransformAxis translation1: coordinates=knee_angle_r_beta axis=(1 0 0)
          MultiplierFunction: scale=1.2043
            SimmSpline: x=(0 0.174533 0.349066 0.523599 0.698132 0.872665 1.0472 1.22173 1.39626 1.5708 1.74533 1.91986 2.0944)
                y=(0.0524 0.0488 0.0437 0.0371 0.0296 0.0216 0.0136 0.0057 -0.0019 -0.0088 -0.0148 -0.0196 -0.0227)
        TransformAxis translation2: coordinates=knee_angle_r_beta axis=(0 1 0)
          MultiplierFunction: scale=1.2043
            SimmSpline: x=(0 0.174533 0.349066 0.523599 0.698132 0.872665 1.0472 1.22173 1.39626 1.5708 1.74533 1.91986 2.0944)
                y=(-0.0108 -0.019 -0.0263 -0.0322 -0.0367 -0.0395 -0.0408 -0.0404 -0.0384 -0.0349 -0.0301 -0.0245 -0.0187)
        TransformAxis translation3: axis=(0 0 1) MultiplierFunction(scale=1.2043, Constant(value=0.00275))
    PinJoint ankle_r: socket_parent_frame=tibia_r_offset socket_child_frame=talus_r_offset
      Coordinate ankle_angle_r: default_value=0 range=(-0.6981317 0.5235988) clamped=true
      PhysicalOffsetFrame tibia_r_offset: socket_parent=/bodyset/tibia_r translation=(-0.01086551 -0.4346204 0)
          orientation=(0.175895 -0.105208 0.0186622)
      PhysicalOffsetFrame talus_r_offset: socket_parent=/bodyset/talus_r translation=(0 0 0)
          orientation=(0.175895 -0.105208 0.0186622)
    PinJoint subtalar_r: socket_parent_frame=talus_r_offset socket_child_frame=calcn_r_offset
      Coordinate subtalar_angle_r: default_value=0 range=(-0.3490659 0.3490659) clamped=true locked=true
      PhysicalOffsetFrame talus_r_offset: socket_parent=/bodyset/talus_r
          translation=(-0.05190004 -0.04464233 0.008428303) orientation=(-1.76819 0.906223 1.8196)
      PhysicalOffsetFrame calcn_r_offset: socket_parent=/bodyset/calcn_r translation=(0 0 0)
          orientation=(-1.76819 0.906223 1.8196)
    PinJoint mtp_r: socket_parent_frame=calcn_r_offset socket_child_frame=toes_r_offset
      Coordinate mtp_angle_r: default_value=0 range=(-0.5235988 0.5235988) clamped=true locked=true
      PhysicalOffsetFrame calcn_r_offset: socket_parent=/bodyset/calcn_r
          translation=(0.1902753 -0.002128359 0.001149314) orientation=(-3.14159 0.619901 0)
      PhysicalOffsetFrame toes_r_offset: socket_parent=/bodyset/toes_r translation=(0 0 0)
          orientation=(-3.14159 0.619901 0)
    CustomJoint hip_l: socket_parent_frame=pelvis_offset socket_child_frame=femur_l_offset
      Coordinate hip_flexion_l: default_value=0 range=(-0.5235988 2.094395) clamped=true
      Coordinate hip_adduction_l: default_value=0 range=(-0.8726646 0.5235988) clamped=true
      Coordinate hip_rotation_l: default_value=0 range=(-0.6981317 0.6981317) clamped=true
      PhysicalOffsetFrame pelvis_offset: socket_parent=/bodyset/pelvis
          translation=(-0.04833382 -0.06741278 -0.06635637)
      PhysicalOffsetFrame femur_l_offset: socket_parent=/bodyset/femur_l translation=(0 0 0)
      SpatialTransform: axes_held_at_zero=(translation1 translation2 translation3)
        TransformAxis rotation1: coordinates=hip_flexion_l axis=(0 0 1) LinearFunction(coefficients=1 0)
        TransformAxis rotation2: coordinates=hip_adduction_l axis=(1 0 0) LinearFunction(coefficients=-1 0)
        TransformAxis rotation3: coordinates=hip_rotation_l axis=(0 1 0) LinearFunction(coefficients=-1 0)
    WeldJoint femur_weld_l: socket_parent_frame=femur_l_offset socket_child_frame=femoral_cond_l_offset
      PhysicalOffsetFrame femur_l_offset: socket_parent=/bodyset/femur_l
          translation=(-0.009742788 -0.4913063 0.003311825)
      PhysicalOffsetFrame femoral_cond_l_offset: socket_parent=/bodyset/femoral_cond_l translation=(0 0 0)
    CustomJoint walker_knee_l: socket_parent_frame=femoral_cond_l_offset
        socket_child_frame=sagittal_articulation_frame_l_offset
      Coordinate knee_angle_l: default_value=0 range=(0 2.0944) clamped=true
      PhysicalOffsetFrame femoral_cond_l_offset: socket_parent=/bodyset/femoral_cond_l translation=(0 0 0)
          orientation=(1.64157 -1.44618 1.5708)
      PhysicalOffsetFrame sagittal_articulation_frame_l_offset: socket_parent=/bodyset/sagittal_articulation_frame_l
          translation=(-0.00808954 -0.0035348 0.001844316) orientation=(1.64157 -1.44618 1.5708)
      SpatialTransform: axes_held_at_zero=translation3
        TransformAxis rotation1: coordinates=knee_angle_l axis=(-1 0 0) LinearFunction(coefficients=1 0)
        TransformAxis rotation2: coordinates=knee_angle_l axis=(0 0 1)
          SimmSpline: x=(0 0.174533 0.349066 0.523599 0.698132 0.872665 1.0472 1.22173 1.39626 1.5708 1.74533 1.91986 2.0944)
              y=(0 0.0126809 0.0226969 0.0296054 0.0332049 0.0335354 0.0308779 0.0257548 0.0189295 0.011407 0.00443314 -0.00050475 -0.0016782)
        TransformAxis rotation3: coordinates=knee_angle_l axis=(0 1 0)
          SimmSpline: x=(0 0.174533 0.349066 0.523599 0.698132 0.872665 1.0472 1.22173 1.39626 1.5708 1.74533 1.91986 2.0944)
              y=(0 -0.059461 -0.109399 -0.150618 -0.18392 -0.210107 -0.229983 -0.24435 -0.254012 -0.25977 -0.262428 -0.262788 -0.261654)
        TransformAxis translation1: coordinates=knee_angle_l axis=(0 1 0)
          MultiplierFunction: scale=1
            SimmSpline: x=(0 0.174533 0.349066 0.523599 0.698132 0.872665 1.0472 1.22173 1.39626 1.5708 1.74533 1.91986 2.0944)
                y=(0 0.000479 0.000835 0.001086 0.001251 0.001346 0.001391 0.001403 0.0014 0.0014 0.001421 0.001481 0.001599)
        TransformAxis translation2: coordinates=knee_angle_l axis=(0 0 1)
          MultiplierFunction: scale=1
            SimmSpline: x=(0 0.174533 0.349066 0.523599 0.698132 0.872665 1.0472 1.22173 1.39626 1.5708 1.74533 1.91986 2.0944)
                y=(0 -0.000988 -0.001899 -0.002734 -0.003492 -0.004173 -0.004777 -0.005305 -0.005756 -0.00613 -0.006427 -0.006648 -0.006792)
    CustomJoint med_cond_joint_l: socket_parent_frame=sagittal_articulation_frame_l_offset
        socket_child_frame=med_cond_l_offset
      Coordinate med_cond_adduction_l: default_value=0 range=(-2.094395 2.094395) clamped=true
          is_free_to_satisfy_constraints=true
      PhysicalOffsetFrame sagittal_articulation_frame_l_offset: socket_parent=/bodyset/sagittal_articulation_frame_l
          translation=(0 -0.025 0.02484362)
      PhysicalOffsetFrame med_cond_l_offset: socket_parent=/bodyset/med_cond_l translation=(0 0 0)
      SpatialTransform: axes_held_at_zero=(rotation2 rotation3 translation1 translation2 translation3)
        TransformAxis rotation1: coordinates=med_cond_adduction_l axis=(1 0 0) LinearFunction(coefficients=1 0)
    CustomJoint lat_cond_joint_l: socket_parent_frame=sagittal_articulation_frame_l_offset
        socket_child_frame=lat_cond_l_offset
      Coordinate lat_cond_adduction_l: default_value=0 range=(-2.094395 2.094395) clamped=true
          is_free_to_satisfy_constraints=true
      PhysicalOffsetFrame sagittal_articulation_frame_l_offset: socket_parent=/bodyset/sagittal_articulation_frame_l
          translation=(0 -0.025 -0.02484362)
      PhysicalOffsetFrame lat_cond_l_offset: socket_parent=/bodyset/lat_cond_l translation=(0 0 0)
      SpatialTransform: axes_held_at_zero=(rotation2 rotation3 translation1 translation2 translation3)
        TransformAxis rotation1: coordinates=lat_cond_adduction_l axis=(1 0 0) LinearFunction(coefficients=1 0)
    WeldJoint med_cond_weld_l: socket_parent_frame=med_cond_l_offset socket_child_frame=tibial_plat_l_offset
      PhysicalOffsetFrame med_cond_l_offset: socket_parent=/bodyset/med_cond_l translation=(0 0 0)
      PhysicalOffsetFrame tibial_plat_l_offset: socket_parent=/bodyset/tibial_plat_l translation=(0 -0.025 0.02484362)
    CustomJoint tibial_plat_weld_l: socket_parent_frame=tibial_plat_l_offset socket_child_frame=tibia_l_offset
      Coordinate knee_add_l: default_value=0 range=(-0.2 0.2) clamped=false locked=true
      Coordinate knee_rot_l: default_value=0 range=(-0.2 0.2) clamped=false locked=true
      Coordinate knee_flex_l: default_value=0 range=(-0.2 0.2) clamped=false locked=true
      PhysicalOffsetFrame tibial_plat_l_offset: socket_parent=/bodyset/tibial_plat_l translation=(0 0 0)
      PhysicalOffsetFrame tibia_l_offset: socket_parent=/bodyset/tibia_l translation=(0 0 0)
      SpatialTransform: axes_held_at_zero=(translation1 translation2 translation3)
        TransformAxis rotation1: coordinates=knee_add_l axis=(1 0 0) LinearFunction(coefficients=1 0)
        TransformAxis rotation2: coordinates=knee_rot_l axis=(0 1 0) LinearFunction(coefficients=1 0)
        TransformAxis rotation3: coordinates=knee_flex_l axis=(0 0 1) LinearFunction(coefficients=1 0)
    CustomJoint patellofemoral_l: socket_parent_frame=femur_l_offset socket_child_frame=patella_l_offset
      Coordinate knee_angle_l_beta: default_value=0 range=(-99999.9 99999.9) clamped=false
      PhysicalOffsetFrame femur_l_offset: socket_parent=/bodyset/femur_l
          translation=(-0.009742788 -0.4913063 0.003311825)
      PhysicalOffsetFrame patella_l_offset: socket_parent=/bodyset/patella_l translation=(0 0 0)
      SpatialTransform: axes_held_at_zero=(rotation2 rotation3)
        TransformAxis rotation1: coordinates=knee_angle_l_beta axis=(0 0 1)
          SimmSpline: x=(0 0.174533 0.349066 0.523599 0.698132 0.872665 1.0472 1.22173 1.39626 1.5708 1.74533 1.91986 2.0944)
              y=(0.00113686 -0.00629212 -0.105582 -0.253683 -0.414245 -0.579047 -0.747244 -0.91799 -1.09044 -1.26379 -1.43763 -1.61186 -1.78634)
        TransformAxis translation1: coordinates=knee_angle_l_beta axis=(1 0 0)
          MultiplierFunction: scale=1.2043
            SimmSpline: x=(0 0.174533 0.349066 0.523599 0.698132 0.872665 1.0472 1.22173 1.39626 1.5708 1.74533 1.91986 2.0944)
                y=(0.0524 0.0488 0.0437 0.0371 0.0296 0.0216 0.0136 0.0057 -0.0019 -0.0088 -0.0148 -0.0196 -0.0227)
        TransformAxis translation2: coordinates=knee_angle_l_beta axis=(0 1 0)
          MultiplierFunction: scale=1.2043
            SimmSpline: x=(0 0.174533 0.349066 0.523599 0.698132 0.872665 1.0472 1.22173 1.39626 1.5708 1.74533 1.91986 2.0944)
                y=(-0.0108 -0.019 -0.0263 -0.0322 -0.0367 -0.0395 -0.0408 -0.0404 -0.0384 -0.0349 -0.0301 -0.0245 -0.0187)
        TransformAxis translation3: axis=(0 0 1) MultiplierFunction(scale=1.2043, Constant(value=-0.00275))
    PinJoint ankle_l: socket_parent_frame=tibia_l_offset socket_child_frame=talus_l_offset
      Coordinate ankle_angle_l: default_value=0 range=(-0.6981317 0.5235988) clamped=true
      PhysicalOffsetFrame tibia_l_offset: socket_parent=/bodyset/tibia_l translation=(-0.01086551 -0.4346204 0)
          orientation=(-0.175895 0.105208 0.0186622)
      PhysicalOffsetFrame talus_l_offset: socket_parent=/bodyset/talus_l translation=(0 0 0)
          orientation=(-0.175895 0.105208 0.0186622)
    PinJoint subtalar_l: socket_parent_frame=talus_l_offset socket_child_frame=calcn_l_offset
      Coordinate subtalar_angle_l: default_value=0 range=(-0.3490659 0.3490659) clamped=true locked=true
      PhysicalOffsetFrame talus_l_offset: socket_parent=/bodyset/talus_l
          translation=(-0.05190004 -0.04464233 -0.008428303) orientation=(1.76819 -0.906223 1.8196)
      PhysicalOffsetFrame calcn_l_offset: socket_parent=/bodyset/calcn_l translation=(0 0 0)
          orientation=(1.76819 -0.906223 1.8196)
    PinJoint mtp_l: socket_parent_frame=calcn_l_offset socket_child_frame=toes_l_offset
      Coordinate mtp_angle_l: default_value=0 range=(-0.5235988 0.5235988) clamped=true locked=true
      PhysicalOffsetFrame calcn_l_offset: socket_parent=/bodyset/calcn_l
          translation=(0.1902753 -0.002128359 -0.001149314) orientation=(-3.14159 -0.619901 0)
      PhysicalOffsetFrame toes_l_offset: socket_parent=/bodyset/toes_l translation=(0 0 0)
          orientation=(-3.14159 -0.619901 0)
    CustomJoint back: socket_parent_frame=pelvis_offset socket_child_frame=torso_offset
      Coordinate lumbar_extension: default_value=0 range=(-1.570796 1.570796) clamped=true
      Coordinate lumbar_bending: default_value=0 range=(-1.570796 1.570796) clamped=true
      Coordinate lumbar_rotation: default_value=0 range=(-1.570796 1.570796) clamped=true
      PhysicalOffsetFrame pelvis_offset: socket_parent=/bodyset/pelvis translation=(-0.08648831 0.06999798 0)
      PhysicalOffsetFrame torso_offset: socket_parent=/bodyset/torso translation=(0 0 0)
      SpatialTransform: axes_held_at_zero=(translation1 translation2 translation3)
        TransformAxis rotation1: coordinates=lumbar_extension axis=(0 0 1) LinearFunction(coefficients=1 0)
        TransformAxis rotation2: coordinates=lumbar_bending axis=(1 0 0) LinearFunction(coefficients=1 0)
        TransformAxis rotation3: coordinates=lumbar_rotation axis=(0 1 0) LinearFunction(coefficients=1 0)
  ConstraintSet:
    CoordinateCouplerConstraint patellofemoral_knee_angle_r_con: independent_coordinate_names=knee_angle_r
        dependent_coordinate_name=knee_angle_r_beta scale_factor=1
        coupled_coordinates_function=LinearFunction(coefficients=1 0)
    CoordinateCouplerConstraint patellofemoral_knee_angle_l_con: independent_coordinate_names=knee_angle_l
        dependent_coordinate_name=knee_angle_l_beta scale_factor=1
        coupled_coordinates_function=LinearFunction(coefficients=1 0)
    WeldConstraint Lat_Cond_r_Constraint: socket_frame1=lat_cond_r_offset socket_frame2=/bodyset/tibial_plat_r
      PhysicalOffsetFrame lat_cond_r_offset: socket_parent=/bodyset/lat_cond_r translation=(0 0.025 -0.02484362)
    WeldConstraint Lat_Cond_l_Constraint: socket_frame1=lat_cond_l_offset socket_frame2=/bodyset/tibial_plat_l
      PhysicalOffsetFrame lat_cond_l_offset: socket_parent=/bodyset/lat_cond_l translation=(0 0.025 0.02484362)
  ForceSet:
    Millard2012EquilibriumMuscle [values shared by the 40 below unless stated]: fiber_damping=0.01
        default_activation=0.01 minimum_activation=0.01
      ActiveForceLengthCurve: min_norm_active_fiber_length=0.25 transition_norm_fiber_length=0.77
          max_norm_active_fiber_length=1.9 shallow_ascending_slope=0.75 minimum_value=0
      ForceVelocityCurve: concentric_slope_at_vmax=0 concentric_slope_near_vmax=0.25 isometric_slope=5
          eccentric_slope_at_vmax=0 eccentric_slope_near_vmax=0.15 max_eccentric_velocity_force_multiplier=1.4
      FiberForceLengthCurve: strain_at_zero_force=0 strain_at_one_norm_force=0.7
      TendonForceLengthCurve
    Millard2012EquilibriumMuscle addbrev_l: max_isometric_force=986.7217 optimal_fiber_length=0.1157803
        tendon_slack_length=0.03981034 pennation_angle_at_optimal=0.1147809 [radians] ignore_tendon_compliance=true
      PathPoint P1: pelvis (-0.01640444 -0.08073387 -0.01322661)
      PathPoint P2: femur_l (-0.0024086 -0.1421074 -0.02998707)
      PathWrap: wrap_object=AB_at_femshaft_l method=hybrid
    Millard2012EquilibriumMuscle addlong_l: max_isometric_force=1445.507 optimal_fiber_length=0.1283961
        tendon_slack_length=0.1564005 pennation_angle_at_optimal=0.1377704
      PathPoint P1: pelvis (-0.006510242 -0.07635363 -0.01621548)
      PathPoint P2: femur_l (0.01356042 -0.2882733 -0.01906407)
      PathWrap: wrap_object=AL_at_femshaft_l method=hybrid
    Millard2012EquilibriumMuscle addmagDist_l: max_isometric_force=941.7474 optimal_fiber_length=0.2237175
        tendon_slack_length=0.1103194 pennation_angle_at_optimal=0.194705 ignore_tendon_compliance=true
      PathPoint P1: pelvis (-0.06359081 -0.1096521 -0.03420024)
      PathPoint P2: femur_l (0.01354838 -0.3161288 -0.02324299)
      PathWrap: wrap_object=AMdist_at_femshaft_l method=hybrid
    Millard2012EquilibriumMuscle addmagIsch_l: max_isometric_force=941.7474 optimal_fiber_length=0.1958122
        tendon_slack_length=0.2712075 pennation_angle_at_optimal=0.1680443
      PathPoint P1: pelvis (-0.07697202 -0.1114471 -0.03582351)
      PathPoint P2: femur_l (0.005792683 -0.4672323 0.03941674)
      PathWrap: wrap_object=AMisch_at_condyles_l method=hybrid
    Millard2012EquilibriumMuscle addmagMid_l: max_isometric_force=941.7474 optimal_fiber_length=0.1701755
        tendon_slack_length=0.05762448 pennation_angle_at_optimal=0.2073076 ignore_tendon_compliance=true
      PathPoint P1: pelvis (-0.04522815 -0.1037087 -0.02451218)
      PathPoint P2: femur_l (0.002914406 -0.1955783 -0.03518965)
      PathWrap: wrap_object=AMmid_at_femshaft_l method=hybrid
    Millard2012EquilibriumMuscle addmagProx_l: max_isometric_force=941.7474 optimal_fiber_length=0.113313
        tendon_slack_length=0.04326934 pennation_angle_at_optimal=0.3114833 ignore_tendon_compliance=true
      PathPoint P1: pelvis (-0.02660782 -0.09237157 -0.01172359)
      PathPoint P2: femur_l (-0.01838966 -0.0949711 -0.03856169)
      PathWrap: wrap_object=AMprox_at_femshaft_l method=hybrid
    Millard2012EquilibriumMuscle bflh_l: max_isometric_force=2070.479 optimal_fiber_length=0.119403
        tendon_slack_length=0.3978794 pennation_angle_at_optimal=0.1759182
      PathPoint P1: pelvis (-0.08932258 -0.1022915 -0.05032984)
      PathPoint P2: tibia_l (-0.03661677 -0.03802928 -0.02748974)
      PathPoint P3: tibia_l (-0.03118401 -0.04943807 -0.03292249)
    Millard2012EquilibriumMuscle bfsh_l: max_isometric_force=878.3956 optimal_fiber_length=0.1307352
        tendon_slack_length=0.1254219 pennation_angle_at_optimal=0.2642232 ignore_tendon_compliance=true
      PathPoint P1: femur_l (0.0060215 -0.2542277 -0.02818062)
      PathPoint P2: tibia_l (-0.03270518 -0.04552648 -0.03455232)
      PathWrap: wrap_object=BF_at_gastroc_l method=hybrid
    Millard2012EquilibriumMuscle edl_l: max_isometric_force=951.5277 optimal_fiber_length=0.07471101
        tendon_slack_length=0.3976774 pennation_angle_at_optimal=0.2182582
      PathPoint P1: tibia_l (-0.01738481 -0.1257139 -0.02227429)
      PathPoint P2: tibia_l (0.01781943 -0.4085431 -0.01216937)
      PathPoint P3: calcn_l (0.09779811 0.03831047 -0.0008513437)
      PathPoint P4: calcn_l (0.1719714 0.005852988 -0.01383434)
      PathPoint P5: toes_l (0.0003192539 0.005001644 -0.01628195)
      PathPoint P6: toes_l (0.04714316 -0.0004256718 -0.02660449)
    Millard2012EquilibriumMuscle ehl_l: max_isometric_force=450.7236 optimal_fiber_length=0.08055758
        tendon_slack_length=0.3519497 pennation_angle_at_optimal=0.1972681
      PathPoint P1: tibia_l (-0.01521171 -0.1684154 -0.02053581)
      PathPoint P2: tibia_l (0.007714511 -0.3160777 -0.01781943)
      PathPoint P3: tibia_l (0.02173102 -0.4012633 0.003042343)
      PathPoint P4: calcn_l (0.1032254 0.04139659 0.02245419)
      PathPoint P5: calcn_l (0.1375984 0.03288315 0.02734942)
      PathPoint P6: calcn_l (0.1845287 0.0147921 0.02979703)
      PathPoint P7: toes_l (0.03171255 0.004363136 0.0260724)
      PathPoint P8: toes_l (0.05991331 0.003618211 0.01979374)
    Millard2012EquilibriumMuscle fdl_l: max_isometric_force=667.2177 optimal_fiber_length=0.04796993
        tendon_slack_length=0.4073925 pennation_angle_at_optimal=0.2248391
      PathPoint P1: tibia_l (-0.002499067 -0.1990561 0.001955792)
      PathPoint P2: tibia_l (-0.0191233 -0.3960478 0.01347323)
      PathPoint P3: calcn_l (0.04639823 0.03352166 0.02979703)
      PathPoint P4: calcn_l (0.07534392 0.01872956 0.02798792)
      PathPoint P5: calcn_l (0.176441 -0.008619855 -0.01234448)
      PathPoint P6: toes_l (-0.002021941 -0.008300601 -0.01564344)
      PathPoint P7: toes_l (0.03032912 -0.007555675 -0.02287986)
      PathPoint P8: toes_l (0.04693032 -0.006385078 -0.02575315)
    Millard2012EquilibriumMuscle fhl_l: max_isometric_force=1431.378 optimal_fiber_length=0.0566221
        tendon_slack_length=0.3807108 pennation_angle_at_optimal=0.2580255
      PathPoint P1: tibia_l (-0.03368308 -0.235021 -0.02173102)
      PathPoint P2: tibia_l (-0.02629453 -0.3988728 0.008257787)
      PathPoint P3: calcn_l (0.03980032 0.02937136 0.02564673)
      PathPoint P4: calcn_l (0.1104618 0.007236421 0.027243)
      PathPoint P5: calcn_l (0.1836774 -0.005640152 0.02862643)
      PathPoint P6: toes_l (0.01649478 -0.00681075 0.02820076)
      PathPoint P7: toes_l (0.05980689 -0.01085463 0.01926165)
    Millard2012EquilibriumMuscle gaslat_l: max_isometric_force=2483.375 optimal_fiber_length=0.06423905
        tendon_slack_length=0.410857 pennation_angle_at_optimal=0.2102268
      PathPoint P1: femur_l (-0.0036129 -0.45932 -0.03335911)
      PathPoint P2: calcn_l (0.00468239 0.03298957 0.005640152)
      PathWrap shank: wrap_object=GasLat_at_shank_l method=hybrid
      PathWrap condyles: wrap_object=Gastroc_at_condyles_l method=hybrid
    Millard2012EquilibriumMuscle gasmed_l: max_isometric_force=4912.191 optimal_fiber_length=0.05584603
        tendon_slack_length=0.4366025 pennation_angle_at_optimal=0.1656816
      PathPoint P1: femur_l (0.009634401 -0.4561889 0.02504944)
      PathPoint P2: calcn_l (0.00468239 0.03298957 0.005640152)
      PathWrap shank: wrap_object=GasMed_at_shank_l method=hybrid
      PathWrap condyles: wrap_object=Gastroc_at_condyles_l method=hybrid
    Millard2012EquilibriumMuscle glmax1_l: max_isometric_force=1551.119 optimal_fiber_length=0.1440711
        tendon_slack_length=0.04786776 pennation_angle_at_optimal=0.3540118 ignore_tendon_compliance=true
      PathPoint P1: pelvis (-0.105727 0.02963105 -0.04835444)
      PathPoint P2: pelvis (-0.1079601 -0.02078468 -0.06690605)
      PathPoint P3: femur_l (-0.05347092 -0.03926018 -0.03636986)
      PathPoint P4: femur_l (-0.03335911 -0.06816338 -0.0566021)
      PathWrap: wrap_object=Gmax1_at_pelvis_l method=hybrid
    Millard2012EquilibriumMuscle glmax2_l: max_isometric_force=2216.894 optimal_fiber_length=0.1606935
        tendon_slack_length=0.06948424 pennation_angle_at_optimal=0.3673821 ignore_tendon_compliance=true
      PathPoint P1: pelvis (-0.1131133 0.007472177 -0.03967984)
      PathPoint P2: pelvis (-0.1154323 -0.05230524 -0.06982621)
      PathPoint P3: femur_l (-0.0541935 -0.07033112 -0.03034836)
      PathPoint P4: femur_l (-0.01878708 -0.1223569 -0.05046017)
      PathWrap: wrap_object=Gmax2_at_pelvis_l method=hybrid
    Millard2012EquilibriumMuscle glmax3_l: max_isometric_force=1494.312 optimal_fiber_length=0.1790468
        tendon_slack_length=0.07474572 pennation_angle_at_optimal=0.3824161 ignore_tendon_compliance=true
      PathPoint P1: pelvis (-0.1116532 -0.04509073 -0.007729839)
      PathPoint P2: pelvis (-0.1093343 -0.1084754 -0.03736089)
      PathPoint P3: femur_l (-0.03384083 -0.1354838 -0.01132042)
      PathPoint P4: femur_l (-0.0072258 -0.1708902 -0.04949673)
      PathWrap: wrap_object=Gmax3_at_pelvis_l method=hybrid
    Millard2012EquilibriumMuscle glmed1_l: max_isometric_force=1724.055 optimal_fiber_length=0.06879085
        tendon_slack_length=0.05259846 pennation_angle_at_optimal=0.3165559 ignore_tendon_compliance=true
      PathPoint P1: pelvis (-0.03821976 0.02104234 -0.1006597)
      PathPoint P2: femur_l (-0.02625374 -0.01409031 -0.06683865)
    Millard2012EquilibriumMuscle glmed2_l: max_isometric_force=1206.31 optimal_fiber_length=0.0690472
        tendon_slack_length=0.06171572 pennation_angle_at_optimal=0.3165559 ignore_tendon_compliance=true
      PathPoint P1: pelvis (-0.07300403 0.02714032 -0.05797379)
      PathPoint P2: femur_l (-0.03107094 -0.00698494 -0.06346661)
    Millard2012EquilibriumMuscle glmed3_l: max_isometric_force=1373.609 optimal_fiber_length=0.07070765
        tendon_slack_length=0.04381244 pennation_angle_at_optimal=0.3165559 ignore_tendon_compliance=true
      PathPoint P1: pelvis (-0.09894194 -0.006269758 -0.04517661)
      PathPoint P2: femur_l (-0.03721287 -0.00566021 -0.06238274)
    Millard2012EquilibriumMuscle glmin1_l: max_isometric_force=589.7533 optimal_fiber_length=0.06878852
        tendon_slack_length=0.01632492 pennation_angle_at_optimal=0.1745329 ignore_tendon_compliance=true
      PathPoint P1: pelvis (-0.03985161 -0.01279718 -0.08949435)
      PathPoint P2: femur_l (-0.008670961 -0.01252472 -0.0674408)
    Millard2012EquilibriumMuscle glmin2_l: max_isometric_force=622.507 optimal_fiber_length=0.05709866
        tendon_slack_length=0.02661109 pennation_angle_at_optimal=0 ignore_tendon_compliance=true
      PathPoint P1: pelvis (-0.05290645 -0.01219597 -0.08339637)
      PathPoint P2: femur_l (-0.01156128 -0.01252472 -0.0674408)
    Millard2012EquilibriumMuscle glmin3_l: max_isometric_force=704.4224 optimal_fiber_length=0.03872227
        tendon_slack_length=0.05183943 pennation_angle_at_optimal=0.01745329
      PathPoint P1: pelvis (-0.06776492 -0.0133125 -0.0685379)
      PathPoint P2: femur_l (-0.01625805 -0.009995691 -0.0662365)
    Millard2012EquilibriumMuscle grac_l: max_isometric_force=443.5401 optimal_fiber_length=0.2783163
        tendon_slack_length=0.2101591 pennation_angle_at_optimal=0.1720016 ignore_tendon_compliance=true
      PathPoint P1: pelvis (-0.04067613 -0.1110692 -0.02109387)
      PathPoint P2: tibia_l (-0.02001427 -0.0516655 0.03217277)
      PathPoint P3: tibia_l (0.001934061 -0.07564567 0.01709145)
      PathWrap: wrap_object=GR_at_condyles_l method=hybrid
    Millard2012EquilibriumMuscle iliacus_l: max_isometric_force=1610.02 optimal_fiber_length=0.1027146
        tendon_slack_length=0.09261725 pennation_angle_at_optimal=0.279914 ignore_tendon_compliance=true
      PathPoint P1: pelvis (-0.05196169 0.02653911 -0.07240282)
      PathPoint P2: pelvis (-0.01159476 -0.04783911 -0.06493065)
      PathPoint P3: femur_l (-0.00276989 -0.06804295 -0.01673977)
      PathPoint P4: femur_l (-0.01469246 -0.07671391 -0.02360428)
      PathWrap: wrap_object=IL_at_brim_l method=hybrid range=(2 3)
    Millard2012EquilibriumMuscle perbrev_l: max_isometric_force=821.7718 optimal_fiber_length=0.04912441
        tendon_slack_length=0.15963 pennation_angle_at_optimal=0.2052361
      PathPoint P1: tibia_l (-0.02640319 -0.2751147 -0.02727243)
      PathPoint P2: tibia_l (-0.03683408 -0.4229943 -0.02705512)
      PathPoint P3: tibia_l (-0.0309667 -0.435055 -0.02770705)
      PathPoint P4: calcn_l (0.05012286 0.02873285 -0.02479539)
      PathPoint P5: calcn_l (0.07204496 0.02330553 -0.03650136)
    Millard2012EquilibriumMuscle perlong_l: max_isometric_force=1758.592 optimal_fiber_length=0.05484814
        tendon_slack_length=0.3586947 pennation_angle_at_optimal=0.2479525
      PathPoint P1: tibia_l (-0.02173102 -0.1491834 -0.03064074)
      PathPoint P2: tibia_l (-0.03444366 -0.4237549 -0.02575126)
      PathPoint P3: tibia_l (-0.02955418 -0.4361415 -0.02607722)
      PathPoint P4: calcn_l (0.04661107 0.02447613 -0.02351837)
      PathPoint P5: calcn_l (0.07247063 0.0112803 -0.0302227)
      PathPoint P6: calcn_l (0.0906681 0.007342839 -0.01255732)
      PathPoint P7: calcn_l (0.1280208 0.009045527 0.0195809)
    Millard2012EquilibriumMuscle piri_l: max_isometric_force=1623.652 optimal_fiber_length=0.02431774
        tendon_slack_length=0.1074715 pennation_angle_at_optimal=0.1745329
      PathPoint P1: pelvis (-0.08744165 -0.005608427 -0.01160335)
      PathPoint P2: pelvis (-0.08762202 -0.02633298 -0.05232242)
      PathPoint P3: femur_l (-0.01782364 -0.00433548 -0.05262791)
    Millard2012EquilibriumMuscle psoas_l: max_isometric_force=2249.601 optimal_fiber_length=0.110349
        tendon_slack_length=0.09396484 pennation_angle_at_optimal=0.2155251 ignore_tendon_compliance=true
      PathPoint P1: pelvis (-0.05204758 0.05325 -0.03349597)
      PathPoint P2: pelvis (-0.01760685 -0.05617016 -0.05634194)
      PathPoint P3: femur_l (-0.01589676 -0.05624081 -0.00553978)
      PathPoint P4: femur_l (-0.02830105 -0.06310532 -0.01059784)
      PathWrap: wrap_object=PS_at_brim_l method=hybrid range=(2 3)
    Millard2012EquilibriumMuscle recfem_l: max_isometric_force=3455.689 optimal_fiber_length=0.08883367
        tendon_slack_length=0.5249187 pennation_angle_at_optimal=0.2170149
      PathPoint P1: pelvis (-0.0206129 -0.03332419 -0.08013266)
      PathPoint P2: patella_l (0.012043 0.0590107 -0.0008430101)
      PathPoint P3: patella_l (0.01457203 0.05262791 0.0012043)
      PathPoint P4: patella_l (0.0060215 0.002974621 -3.6129e-5)
      PathPoint P5: tibia_l (0.03542156 -0.06858309 0.0005106789)
      PathWrap: wrap_object=KnExt_at_fem_l method=hybrid
    Millard2012EquilibriumMuscle sart_l: max_isometric_force=393.2464 optimal_fiber_length=0.4606868
        tendon_slack_length=0.1417496 pennation_angle_at_optimal=0.02613542 ignore_tendon_compliance=true
      PathPoint P1: pelvis (-0.01674798 -0.01339839 -0.09069677)
      PathPoint P2: femur_l (-0.0036129 -0.4296943 0.05070103)
      PathPoint P3: tibia_l (-0.02727243 -0.04357069 0.03965911)
      PathPoint P4: tibia_l (-0.01727616 -0.0650844 0.02868494)
      PathPoint P5: tibia_l (0.01477709 -0.08801062 0.002825032)
    Millard2012EquilibriumMuscle semimem_l: max_isometric_force=3470.267 optimal_fiber_length=0.08442837
        tendon_slack_length=0.4253061 pennation_angle_at_optimal=0.2545615
      PathPoint P1: pelvis (-0.08477056 -0.09791129 -0.05273468)
      PathPoint P2: tibia_l (-0.03150998 -0.04530917 0.0212964)
      PathWrap: wrap_object=SM_at_condyles_l method=hybrid
    Millard2012EquilibriumMuscle semiten_l: max_isometric_force=932.2872 optimal_fiber_length=0.2347797
        tendon_slack_length=0.3007113 pennation_angle_at_optimal=0.241295
      PathPoint P1: pelvis (-0.08915081 -0.1076165 -0.04423185)
      PathPoint P2: tibia_l (-0.03390039 -0.05519679 0.02488202)
      PathPoint P3: tibia_l (0.002064447 -0.08399039 0.01271265)
      PathWrap: wrap_object=ST_at_condyles_l method=hybrid
    Millard2012EquilibriumMuscle soleus_l: max_isometric_force=9767.328 optimal_fiber_length=0.04775597
        tendon_slack_length=0.3003806 pennation_angle_at_optimal=0.3814289
      PathPoint P1: tibia_l (-0.008257787 -0.09952806 -0.0106482)
      PathPoint P2: calcn_l (0.00468239 0.03298957 0.005640152)
    Millard2012EquilibriumMuscle tfl_l: max_isometric_force=648.344 optimal_fiber_length=0.1081429
        tendon_slack_length=0.5116834 pennation_angle_at_optimal=0.05235988
      PathPoint P1: pelvis (-0.02671089 0.01837984 -0.1065859)
      PathPoint P2: femur_l (0.03540642 -0.1198279 -0.07189671)
      PathPoint P3: femur_l (0.01288601 -0.4877415 -0.03901932)
      PathPoint P4: tibia_l (0.01173475 -0.04454859 -0.03759466)
    Millard2012EquilibriumMuscle tibant_l: max_isometric_force=1935.308 optimal_fiber_length=0.0739238
        tendon_slack_length=0.2602605 pennation_angle_at_optimal=0.1951828
      PathPoint P1: tibia_l (0.01673288 -0.1425555 -0.01760212)
      PathPoint P2: tibia_l (0.02727243 -0.2070966 -0.01390785)
      PathPoint P3: tibia_l (0.02531664 -0.397569 0.01434247)
      PathPoint P4: calcn_l (0.1240833 0.0189424 0.03245748)
    Millard2012EquilibriumMuscle tibpost_l: max_isometric_force=2727.911 optimal_fiber_length=0.04094038
        tendon_slack_length=0.3041065 pennation_angle_at_optimal=0.2264891
      PathPoint P1: tibia_l (-0.004454859 -0.1416862 -0.01119147)
      PathPoint P2: tibia_l (-0.01781943 -0.3971344 0.01901464)
      PathPoint P3: calcn_l (0.04437629 0.0355436 0.03043554)
      PathPoint P4: calcn_l (0.08215467 0.01692046 0.02990345)
    Millard2012EquilibriumMuscle vasint_l: max_isometric_force=2676.206 optimal_fiber_length=0.1180919
        tendon_slack_length=0.2404778 pennation_angle_at_optimal=0.06309973
      PathPoint P1: femur_l (0.0349247 -0.2317073 -0.0373333)
      PathPoint P2: femur_l (0.04034405 -0.2509761 -0.03432255)
      PathPoint P3: patella_l (0.00698494 0.0578064 0.00072258)
      PathPoint P4: patella_l (0.0060215 0.002974621 0.000469677)
      PathPoint P5: tibia_l (0.03538896 -0.06867002 -0.0004672169)
      PathWrap: wrap_object=KnExt_at_fem_l method=hybrid
    Millard2012EquilibriumMuscle vaslat_l: max_isometric_force=8117.994 optimal_fiber_length=0.1182874
        tendon_slack_length=0.2625187 pennation_angle_at_optimal=0.2528673
      PathPoint P1: femur_l (0.00578064 -0.2232772 -0.04203007)
      PathPoint P2: femur_l (0.03239567 -0.3120342 -0.04925587)
      PathPoint P3: patella_l (0.01240429 0.05094189 -0.01698063)
      PathPoint P4: patella_l (0.0060215 0.002974621 -0.00882752)
      PathPoint P5: tibia_l (0.03535637 -0.0688656 -0.005552275)
      PathWrap: wrap_object=KnExt_at_fem_l method=hybrid
    Millard2012EquilibriumMuscle vasmed_l: max_isometric_force=4332.457 optimal_fiber_length=0.1150583
        tendon_slack_length=0.23761 pennation_angle_at_optimal=0.4222225
      PathPoint P1: femur_l (0.0168602 -0.2527826 -0.02264084)
      PathPoint P2: femur_l (0.04287308 -0.3334707 -0.00108387)
      PathPoint P3: patella_l (0.00758709 0.05359135 0.0204731)
      PathPoint P4: patella_l (0.0060215 0.002974621 0.01023655)
      PathPoint P5: tibia_l (0.03466097 -0.06907204 0.007366815)
      PathWrap: wrap_object=KnExt_at_fem_l method=hybrid
    CoordinateActuator lumbar_ext: coordinate=lumbar_extension optimal_force=10
    CoordinateActuator lumbar_bend: coordinate=lumbar_bending optimal_force=10
    CoordinateActuator lumbar_rot: coordinate=lumbar_rotation optimal_force=10
    CoordinateActuator hip_flex_r: coordinate=hip_flexion_r optimal_force=10
    CoordinateActuator hip_rot_r: coordinate=hip_rotation_r optimal_force=10
    CoordinateActuator hip_add_r: coordinate=hip_adduction_r optimal_force=10
    CoordinateActuator knee_flex_r: coordinate=knee_angle_r optimal_force=10
    CoordinateActuator ankle_flex_r: coordinate=ankle_angle_r optimal_force=10
    ObjectGroup left_leg: members=(addbrev_l addlong_l addmagDist_l addmagIsch_l addmagMid_l addmagProx_l bflh_l bfsh_l edl_l ehl_l fdl_l fhl_l gaslat_l gasmed_l glmax1_l glmax2_l glmax3_l glmed1_l glmed2_l glmed3_l glmin1_l glmin2_l glmin3_l grac_l iliacus_l perbrev_l perlong_l piri_l psoas_l recfem_l sart_l semimem_l semiten_l soleus_l tfl_l tibant_l tibpost_l vasint_l vaslat_l vasmed_l)
    ObjectGroup hip_add_l: members=(addbrev_l addlong_l addmagDist_l addmagIsch_l addmagMid_l addmagProx_l bflh_l grac_l semimem_l semiten_l)
    ObjectGroup hip_abd_l: members=(glmax1_l glmed1_l glmed2_l glmed3_l glmin1_l glmin2_l glmin3_l piri_l sart_l tfl_l)
    ObjectGroup hip_flex_l: members=(addbrev_l addlong_l glmin1_l grac_l iliacus_l psoas_l recfem_l sart_l tfl_l)
    ObjectGroup hip_ext_l: members=(addlong_l addmagDist_l addmagIsch_l addmagMid_l addmagProx_l bflh_l glmax1_l glmax2_l glmax3_l glmed1_l glmed2_l glmed3_l glmin3_l semimem_l semiten_l)
    ObjectGroup hip_exrot_l: members=(glmin3_l piri_l)
    ObjectGroup hip_inrot_l: members=(glmed1_l glmed2_l glmed3_l glmin1_l iliacus_l psoas_l tfl_l)
    ObjectGroup knee_flex_l: members=(bflh_l bfsh_l gaslat_l gasmed_l grac_l sart_l semimem_l semiten_l)
    ObjectGroup knee_ext_l: members=(recfem_l vasint_l vaslat_l vasmed_l)
    ObjectGroup ankle_df_l: members=(edl_l ehl_l tibant_l)
    ObjectGroup ankle_pf_l: members=(fdl_l fhl_l gaslat_l gasmed_l perbrev_l perlong_l soleus_l tibpost_l)
    ObjectGroup everter_l: members=(edl_l perbrev_l perlong_l)
    ObjectGroup inverter_l: members=(ehl_l fdl_l fhl_l tibant_l tibpost_l)
  MarkerSet:
    Marker RFoot2: toes_r (0.07784866 0.01161241 -0.03608999)
    Marker LFoot2: toes_l (0.07149434 0.01466349 0.02739029)
    Marker LFoot1: calcn_l (-0.01395523 0.003620239 0.0223253)
    Marker RFemur6: femur_r (-0.02567327 -0.4786024 0.08072815)
    Marker LFemur6: femur_l (-0.02248641 -0.4912688 -0.07681813)
    Marker LTibia6: tibia_l (-0.01668762 -0.4357151 -0.03570262)
    Marker RTibia6: tibia_r (-0.0255698 -0.4324257 0.03299748)
    Marker RFoot1: calcn_r (-0.009827549 -0.001539282 -0.03178281)
    Marker RFemur5: femur_r (-0.04347333 -0.492845 -0.04860507)
    Marker LFemur5: femur_l (-0.03984537 -0.4999411 0.04842587)
    Marker RTibia5: tibia_r (0.001024183 -0.4103434 -0.05288832)
    Marker LTibia5: tibia_l (0.0001293217 -0.4137495 0.04842372)
    Marker RFoot3: toes_r (0.02398264 0.008635587 0.01869496)
    Marker LFoot3: toes_l (0.02339462 0.0103 -0.02938236)
    Marker Torso4: torso (-0.09190962 0.4230494 -0.004445922)
    Marker Torso2: torso (0.01326276 0.3800191 0.1968944)
    Marker Torso3: torso (-0.01241003 0.3811839 -0.215657)
    Marker Torso1: torso (0.08010247 0.3625784 -0.01085603)
    Marker RFemur1: femur_r (-0.03736089 -0.2929233 0.1212473)
    Marker RFemur2: femur_r (0.05318785 -0.277955 0.118315)
    Marker RFemur3: femur_r (0.03774235 -0.4033088 0.1165546)
    Marker RFemur4: femur_r (-0.03848221 -0.403257 0.1214042)
    Marker LFemur2: femur_l (-0.02653744 -0.269892 -0.123475)
    Marker LFemur1: femur_l (0.06164622 -0.2967425 -0.1138067)
    Marker LFemur4: femur_l (-0.04204183 -0.4172954 -0.1181843)
    Marker LFemur3: femur_l (0.03327618 -0.4240087 -0.1133849)
    Marker RTibia1: tibia_r (-0.02706276 -0.1836513 0.08633621)
    Marker RTibia2: tibia_r (-0.02123731 -0.1254763 0.09079317)
    Marker RTibia3: tibia_r (-0.006156144 -0.2242579 0.07106305)
    Marker RTibia4: tibia_r (-0.06947336 -0.1864314 0.0768887)
    Marker LTibia2: tibia_l (-0.06592791 -0.1623156 -0.08607744)
    Marker LTibia1: tibia_l (-0.04016655 -0.1937867 -0.08376388)
    Marker LTibia4: tibia_l (0.002005044 -0.1876263 -0.07749951)
    Marker LTibia3: tibia_l (-0.04879768 -0.2658674 -0.06636739)
    Marker Pelvis1: pelvis (-0.2271856 0.1434152 0.03234778)
    Marker Pelvis4: pelvis (-0.2460091 -0.007169444 -0.05406388)
    Marker Pelvis3: pelvis (-0.2448159 0.002720341 0.04783515)
    Marker Pelvis2: pelvis (-0.2285386 0.1329685 -0.06841087)
    Marker RFoot4: calcn_r (0.1547187 0.04497298 0.006968898)
    Marker RFoot5: calcn_r (0.1821205 0.03424705 0.004899763)
    Marker LFoot4: calcn_l (0.1494219 0.05003747 -0.005745643)
    Marker LFoot5: calcn_l (0.1782713 0.04001134 -0.004962226)
    Marker Pelvis_LFemur_score: femur_l (0.01703935 -0.01348818 -0.03540999)
    Marker Pelvis_RFemur_score: femur_r (0.008752236 0.01868413 0.03080142)
    Marker RKnee: tibia_r (-0.01474935 0.007020582 0.05434201)
    Marker LKnee: tibia_l (-0.01193507 0.001385691 -0.03695781)
    Marker RTibia_RFoot_score: talus_r (-0.0300771 -0.03961533 -0.02507526)
    Marker LTibia_LFoot_score: talus_l (-0.0233253 -0.03668132 0.006666665)
    Marker RFoot1_flat: calcn_r (-0.008275122 -0.02747314 -0.03397035)
    Marker RFoot2_flat: toes_r (0.07905274 -0.008502199 -0.03778667)
    Marker RFoot3_flat: toes_r (0.02547509 -0.01629629 0.01659194)
    Marker LFoot1_flat: calcn_l (-0.01160539 -0.02918863 0.02497056)
    Marker LFoot2_flat: toes_l (0.07305486 -0.007124676 0.029147)
    Marker LFoot3_flat: toes_l (0.02521419 -0.01510501 -0.02733404)
    Marker RFoot4_flat: calcn_r (0.1586361 -0.02046928 0.001448798)
    Marker RFoot5_flat: calcn_r (0.1852951 -0.0187872 0.0004262875)
    Marker LFoot4_flat: calcn_l (0.1543899 -0.0193253 -0.0001531636)
    Marker LFoot5_flat: calcn_l (0.1823786 -0.01733563 -0.000338539)
